*HEADING
Contact with friction
*NODE
1,0.0,0,0
2,0.01,0,0
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*ELEMENT, TYPE=T3D2
1,1,2
2,2,3
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*SURFACE, NAME=MASTER
1,SPOS
*SURFACE, NAME=SLAVE
2,SNEG
*SURFACE INTERACTION, NAME=INT1
*FRICTION
0.25
*CONTACT PAIR, INTERACTION=INT1
SLAVE,MASTER
*STEP, NLGEOM=YES, INC=300
*STATIC
*CLOAD
102,1,8.0
*OUTPUT
*NODE OUTPUT
U,NT11
*END STEP
