*HEADING
Contact pair with friction demo
*SURFACE, NAME=S_MASTER
1,
*SURFACE, NAME=S_SLAVE
2,
*SURFACE INTERACTION, NAME=I1
*FRICTION
0.25,
*CONTACT PAIR, INTERACTION=I1
S_MASTER, S_SLAVE
*STEP
*STATIC
*OUTPUT
*NODE OUTPUT
U
*END STEP
