*HEADING
Official-like dynamic parse baseline
*NODE
1,0,0,0
2,1,0,0
*ELEMENT, TYPE=T3D2
1,1,2
*AMPLITUDE, NAME=A1
0.,0.,1.,1.
*STEP
*DYNAMIC
0.01,1.0
*CONTROLS
*SOLUTION TECHNIQUE, TYPE=QUASI-NEWTON
*VISCO
*OUTPUT
*NODE FILE
U
*EL FILE
S
*END STEP
