*HEADING
Official-like MPC and coupling
*PART, NAME=P1
*NODE
1,0,0,0
2,1,0,0
3,2,0,0
*ELEMENT, TYPE=T3D2, ELSET=EALL
1,1,2
2,2,3
*END PART
*ASSEMBLY, NAME=A1
*INSTANCE, NAME=I1, PART=P1
*END INSTANCE
*NSET, NSET=REF
1,
*NSET, NSET=EDGE
2,3
*END ASSEMBLY
*STEP
*STATIC
*COUPLING, CONSTRAINT NAME=C1, REF NODE=REF, SURFACE=EDGE
*KINEMATIC
*MPC
BEAM,1,2
*OUTPUT
*NODE OUTPUT
U
*END STEP
