*HEADING
Cantilever beam demo
*NODE
1,0,0,0
2,1,0,0
3,2,0,0
4,3,0,0
5,4,0,0
*ELEMENT, TYPE=T3D2
1,1,2
2,2,3
3,3,4
4,4,5
*NSET, NSET=FIX
1,
*BOUNDARY
FIX,1,1,0
*STEP, NLGEOM=YES, INC=100
*STATIC
*CLOAD
5,1,2.0
*OUTPUT
*NODE OUTPUT
U,RF
*END STEP
