*HEADING
Cantilever tip moment demo
*NODE
1,0,0,0
2,1,0,0
3,2,0,0
*ELEMENT, TYPE=T3D2, ELSET=EALL
1,1,2
2,2,3
*NSET, NSET=FIX
1,
*STEP, NLGEOM=YES
*STATIC
*BOUNDARY
FIX,1,3,0.0
*CLOAD
3,2,0.5
3,3,0.5
*OUTPUT
*NODE OUTPUT
U
*END STEP
