*HEADING
Coupled thermo-structural demo
*NODE
1,0.0,0,0
2,0.1,0,0
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*ELEMENT, TYPE=CPS4
1,1,2,3,4
*MATERIAL, NAME=MAT1
*ELASTIC
210000,0.3
*CONDUCTIVITY
45.0
*STEP, NLGEOM=YES, INC=100
*STATIC
*HEAT TRANSFER
*TEMPERATURE
1,20
*CLOAD
64,1,10.0
*OUTPUT
*NODE OUTPUT
U,NT11
*END STEP
