*HEADING
Large mesh 120 elements
*NODE
1,0.0,0,0
2,0.01,0,0
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*ELEMENT, TYPE=T3D2
1,1,2
2,2,3
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*NSET, NSET=FIX
1
*BOUNDARY
FIX,1,1,0.0
*STEP, NLGEOM=YES, INC=200
*STATIC
*CLOAD
121,1,5.0
*OUTPUT
*NODE OUTPUT
U,NT11
*END STEP
