*HEADING
Shear patch demo
*NODE
1,0,0,0
2,1,0,0
3,1,1,0
4,0,1,0
*ELEMENT, TYPE=CPS4, ELSET=EALL
1,1,2,3,4
*STEP
*STATIC
*BOUNDARY
1,1,2,0.0
4,1,2,0.0
*CLOAD
2,2,1.0
3,2,1.0
*OUTPUT
*NODE OUTPUT
U
*END STEP
