*HEADING
User material depvar demo
*NODE
1,0,0,0
2,1,0,0
*ELEMENT, TYPE=T3D2
1,1,2
*MATERIAL, NAME=UMAT1
*USER MATERIAL, CONSTANTS=2
100.,0.2
*DEPVAR
12
*STEP
*STATIC
*CLOAD
2,1,0.1
*OUTPUT
*NODE OUTPUT
U
*END STEP
